// COMSOL Multiphysics 6.3.0.420 model "sensor.mph"
// Outline of the model tree

Parameters
  F_applied = 300[N]  // Applied force
  Br_magnet = 1.45[T]  // N52 remanent flux
  E_TPU = 25e6[Pa]  // Young's modulus
  nu_TPU = 0.47  // Poisson's ratio

Common definitions
  disp1: PrescribedMeshDisplacementDeformedGeometry "Prescribed Mesh Displacement 1" on no boundaries
    prescribedMeshDisplacement = {u, v, w}
  free1: DeformingDomainDeformedGeometry "Deforming Domain 1" on domains 1

Geometry
  geom1 "Geometry 1" (3D, length unit mm)
    cyl1: Cylinder "Mold" | r = 17; h = 19.85; pos = {0, 0, -5.85}
    cyl3: Cylinder "Magnet" | r = 6; h = 5; pos = {0, 0, 7}
    blk1: Block "Sensor_surface" | size = {3, 3, 0.85}; base = center; pos = {0, 0, -5.425}
    sph1: Sphere | r = 120
    dif1: Difference | input = cyl1; input2 = cyl3; keepsubtract = on
    dif2: Difference | input = dif1; input2 = blk1; keepsubtract = on
    fin: Finalize "Form Union"

Materials
  mat1: Common "TPU" on domains 2
    def: def "Basic"
      relpermeability = 1
      electricconductivity = 0
      density = 1200
    Enu: Enu "Young's modulus and Poisson's ratio"
      E = 25e6
      nu = 0.47
  mat2: Common "NdFeB_N52" on domains 3
    def: def "Basic"
      relpermeability = 1.05
      electricconductivity = 0
      density = 7500
    Enu: Enu "Young's modulus and Poisson's ratio"
      E = 160e9
      nu = 0.24
  mat3: Common "Air" on domains 1, 4
    def: def "Basic"
      thermalexpansioncoefficient = alpha_p(pA,T)
      molarmass = 0.02897[kg/mol]
      bulkviscosity = muB(T)
      relpermeability = 1
      relpermittivity = 1
      dynamicviscosity = eta(T)
      ratioofspecificheat = 1.4
      electricconductivity = 0[S/m]
      heatcapacity = Cp(T)
      density = rho(pA,T)
      thermalconductivity = k(T)
      soundspeed = cs(T)
      eta: Piecewise | arg = T; pieces = {200.0, 1600.0, -8.38278E-7+8.35717342E-8*T^1-7.69429583E-11*T^2+4.6437266E-14*T^3-1.06585607E-17*T^4}; argunit = K; fununit = Pa*s
      Cp: Piecewise | arg = T; pieces = {200.0, 1600.0, 1047.63657-0.372589265*T^1+9.45304214E-4*T^2-6.02409443E-7*T^3+1.2858961E-10*T^4}; argunit = K; fununit = J/(kg*K)
      rho: Analytic | expr = pA*0.02897/R_const[K*mol/J]/T; args = {pA, T}; fununit = kg/m^3; argunit = {Pa, K}
      k: Piecewise | arg = T; pieces = {200.0, 1600.0, -0.00227583562+1.15480022E-4*T^1-7.90252856E-8*T^2+4.11702505E-11*T^3-7.43864331E-15*T^4}; argunit = K; fununit = W/(m*K)
      cs: Analytic | expr = sqrt(1.4*R_const[K*mol/J]/0.02897*T); args = T; fununit = m/s; argunit = K
      an1: Analytic | funcname = alpha_p; expr = -1/rho(pA,T)*d(rho(pA,T),T); args = {pA, T}; fununit = 1/K; argunit = {Pa, K}
      an2: Analytic "Analytic 2a" | funcname = muB; expr = 0.6*eta(T); args = T; fununit = Pa*s; argunit = K
    RefractiveIndex: RefractiveIndex
      n = 1
      ki = 0
    NonlinearModel: NonlinearModel
      BA = def.gamma-1
    idealGas: idealGas
      Rs = R_const/Mn
      heatcapacity = Cp(T)
      ratioofspecificheat = 1.4
      molarmass = 0.02897[kg/mol]
      Cp: Piecewise | arg = T; pieces = {200.0, 1600.0, 1047.63657-0.372589265*T^1+9.45304214E-4*T^2-6.02409443E-7*T^3+1.2858961E-10*T^4}; argunit = K; fununit = J/(kg*K)

Physics
  solid: SolidMechanics on domains 2
    dependent variable u = {u, v, w}
    lemm1: LinearElasticModel "Linear Elastic Material 1" (default)
    free1: Free (default)
    init1: init "Initial Values 1" (default)
    fix1: Fixed "Fixed Constraint 1" on boundaries 7
    bndl1: BoundaryLoad on boundaries 8 | forceType = TotalForce; force = {0, 0, -F_applied}
  mfnc: MagnetostaticsNoCurrents "Magnetic Fields, No Currents" on all domains
    dependent variable Vm
    fsp1: FreeSpace (default)
    mi1: MagneticInsulation (default)
    init1: init "Initial Values 1" (default)
    mag1: Magnet on domains 3
      DirectionMethod = UserDefined
      directionInput = {0, 0, -1}
      normBr_crel_BH_RemanentFluxDensity_mat = userdef
      normBr_crel_BH_RemanentFluxDensity = Br_magnet
    mi2: MagneticInsulation on boundaries 1-4, 18, 19, 22, 23

Mesh
  mesh1 "Mesh 1" (physics-controlled)
    size: MeshSizeDefault | hauto = 4

Studies
  std1 "Study 1"
    param: Parametric "Parametric Sweep" | pname = F_applied; plistarr = range(0,15,300); punit = N
    stat: Stationary